VAX := READPRN("vax.DNO")
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Rb := 1
IS := 1*10^-10
M := 2
Ft := 0.025
NFt := M*Ft
Is0 := IS
x := 0, 10^-5 .. 0.023
Given
0.63645 == 0.0002248*Rb + ln((IS + 0.0002248)/IS)*M*Ft
0.92145 == 0.0082208*Rb + ln((IS + 0.0082208)/IS)*M*Ft
0.78145 == 0.003353*Rb + ln((IS + 0.003353)/IS)*M*Ft
0.7033159 == 0.0012034*Rb + ln((IS + 0.0012034)/IS)*M*Ft
0.981450 == 0.0104604*Rb + ln((IS + 0.0104604)/IS)*M*Ft
Di := Minerr(IS, Rb, M, Ft)
Di = [0; 24.0006; 1.45775; 0.0177456]
IS_new := Di[0]
Rb_new := Di[1]
M_new := Di[2]
Ft_new := Di[3]
MFt_new := M_new*Ft_new
idio(x) := x*Rb_new + MFt_new*ln((x + IS_new)/IS_new)
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# График совпал с теоретическими значениями (по рисунку)
