i := 0 .. 5
Fmax[i] := 243167, 254978, 285550, 310910, 341134, 363988
Vvar[i] := 0.4, 0.3, -0.1, -0.7, -2, -2.9
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Fr == 1/(2*pi*sqrt((Ck + Cd)*Lk))
-(Ck*Lk - 1/(4*Fr^2*pi^2))/Lk
Lk := 10^-3
Ck := 10^-10
pi := 3.14
Fr[i] := Fmax[i]
Cd := -(Ck*Lk - 1/(4*Fr^2*pi^2))/Lk
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Fmax[i] := 243167, 254978, 285550, 310910, 341134, 363988
Vvar[i] := 0.4, 0.3, -0.1, -0.7, -2, -2.9
Cd = [3.28816e-10; 2.9001e-10; 2.10968e-10; 1.62308e-10; 1.17887e-10; 9.13844e-11]
Mm := 0.5
VJ0m := 0.6
CJ0m := 10^-12
Given
3.288*10^-10 == CJ0m*(1 - 0.4/VJ0m)^(-Mm)
2.9*10^-10 == CJ0m*(1 - 0.3/VJ0m)^(-Mm)
3.288*10^-11 == CJ0m*(1 - (-2.9/VJ0m))^(-Mm)
Answer := Minerr(CJ0m, VJ0m, Mm)
Answer = [2.07243e-10; 1.97101; 2.03484]
CJ0new := Answer[0]
VJ0new := Answer[1]
Mnew := Answer[2]
CD_new(U) := CJ0new*(1 - U/VJ0new)^(-Mnew)
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