i := 0 .. 5
Fmax[i] := 243167, 254978, 285550, 310910, 341134, 363988
Vvar[i] := -0.4, -0.3, 0.1, 0.7, 2, 2.9
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Fr == 1/(2*pi*sqrt((Ck + Cd)*Lk))
-(Ck*Lk - 1/(4*Fr^2*pi^2))/Lk
Lk := 10^-3
Ck := 10^-10
pi := 3.14
Fr[i] := Fmax[i]
Cd := -(Ck*Lk - 1/(4*Fr^2*pi^2))/Lk
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Fmax[i] := 243167, 254978, 285550, 310910, 341134, 363988
Vvar[i] := -0.4, -0.3, 0.1, 0.7, 2, 2.9
Cd = [3.28816e-10; 2.9001e-10; 2.10968e-10; 1.62308e-10; 1.17887e-10; 9.13844e-11]
M := 0.5
VJ0 := 0.6
CJ0 := 10^-12
U := -10, -8 .. 0
my_cd(U) := CJ0*(1 - U/VJ0)^(-M)
my_cd(U) = [2.37915e-13; 2.64135e-13; 3.01511e-13; 3.61158e-13; 4.80384e-13; 1e-12]
U = [-10; -8; -6; -4; -2; 0]
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Given
